<?xml version="1.0" encoding="UTF-8"?>
<channelml xmlns="http://morphml.org/channelml/schema" xmlns:xsi="http://www.w3.org/2001/XMLSchema-instance" xmlns:meta="http://morphml.org/metadata/schema" xsi:schemaLocation="http://morphml.org/channelml/schema     ../../Schemata/v1.8.0/Level2/ChannelML_v1.8.0.xsd" units="Physiological Units">

    <meta:notes>ChannelML file containing a single Channel description</meta:notes>

    <channel_type name="LeakConductance_if_gl" density="yes">

        <status value="stable"/>

        <meta:notes>Leak conductance for the integrate-and-fire model of the granule cell.</meta:notes>

        <meta:authorList>
	  <meta:modelAuthor>
            <meta:name>Jason Rothman</meta:name>
            <meta:institution>UCL</meta:institution>
            <meta:email>j.rothman - at - ucl.ac.uk</meta:email>
          </meta:modelAuthor>
          <meta:modelTranslator>
            <meta:name>Eugenio Piasini</meta:name>
            <meta:institution>UCL</meta:institution>
            <meta:email>e.piasini - at - ucl.ac.uk</meta:email>
          </meta:modelTranslator>
        </meta:authorList>

        <current_voltage_relation cond_law="ohmic" ion="non_specific" default_erev="-75" default_gmax="0.3183092"/>

    </channel_type>

</channelml>
