<?xml version="1.0" encoding="UTF-8"?>
<channelml xmlns="http://morphml.org/channelml/schema" xmlns:xsi="http://www.w3.org/2001/XMLSchema-instance" xmlns:meta="http://morphml.org/metadata/schema" xsi:schemaLocation="http://morphml.org/channelml/schema   http://www.neuroml.org/NeuroMLValidator/NeuroMLFiles/Schemata/v1.8.1/Level2/ChannelML_v1.8.1.xsd" units="Physiological Units">

    <meta:notes>ChannelML file describing a synaptic mechanism</meta:notes>

    <synapse_type name="NMDA_if_gl">

        <status value="stable">
            <meta:contributor>
                <meta:name>Eugenio Piasini</meta:name>
            </meta:contributor>
        </status>

        <meta:notes>NMDA synapse for J. Rothman's integrate-and-fire granule cell model.</meta:notes>

        <blocking_syn max_conductance="0.34493226410404537E-6" rise_time="0.71428156941096088" decay_time="20.237434165271281" reversal_potential="0">
            <block species="mg" conc="1" eta="0.69630948908395673" gamma="0.037357666964309727"/>
        </blocking_syn>

    </synapse_type>

</channelml>
