<?xml version="1.0" encoding="UTF-8"?>
<neuroml xmlns="http://www.neuroml.org/schema/neuroml2" xmlns:xsi="http://www.w3.org/2001/XMLSchema-instance" xsi:schemaLocation="http://www.neuroml.org/schema/neuroml2  https://raw.github.com/NeuroML/NeuroML2/development/Schemas/NeuroML2/NeuroML_v2beta1.xsd" id="Golgi_210710_C1">

    <include href="Ca_HVA.channel.nml"/>

    <include href="Ca_LVA.channel.nml"/>

    <include href="CALC.channel.nml"/>

    <include href="CALC_ca2.channel.nml"/>

    <include href="HCN1.channel.nml"/>

    <include href="HCN2.channel.nml"/>

    <include href="KA.channel.nml"/>

    <include href="KBK.channel.nml"/>

    <include href="KM.channel.nml"/>

    <include href="KSK.channel.nml"/>

    <include href="KV.channel.nml"/>

    <include href="LeakConductance.channel.nml"/>

    <include href="NaP.channel.nml"/>

    <include href="NaR.channel.nml"/>

    <include href="NaT.channel.nml"/>

    <include href="VariableLeakConductance.channel.nml"/>

    <cell id="Golgi_210710_C1">

        <notes>Cell morphology generated by neuroConstruct from file: Cell-No2-210710-C1.ASC
V3 text file written for MicroBrightField products.</notes>

        <morphology id="morphology_Golgi_210710_C1">

            <segment id="0" name="RootSegment">
                <proximal x="0.0" y="0.0" z="0.0" diameter="20.0"/>
                <distal x="0.0" y="0.0" z="0.0" diameter="20.0"/>
            </segment>

            <segment id="60" name="DendriteCyan_10000">
                <parent segment="0"/>
                <proximal x="0.36528873" y="11.053084" z="0.0" diameter="2.07"/>
                <distal x="0.4373169" y="12.215845" z="0.0" diameter="1.48"/>
            </segment>

            <segment id="61" name="DendriteCyan_10001">
                <parent segment="60"/>
                <distal x="0.6191063" y="13.351165" z="0.0" diameter="1.18"/>
            </segment>

            <segment id="62" name="DendriteCyan_10002">
                <parent segment="61"/>
                <distal x="0.6757002" y="14.423031" z="0.0" diameter="1.04"/>
            </segment>

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
            <segmentGroup id="Soma">
                <member segment="0"/>
            </segmentGroup>

            <segmentGroup id="SecDendriteCyan_2">
                <member segment="60"/>

                <member segment="61"/>

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            </segmentGroup>

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
            <segmentGroup id="soma_group">
                <include segmentGroup="Soma"/>
            </segmentGroup>

            <segmentGroup id="mossy">
                <include segmentGroup="Soma"/>
                <include segmentGroup="SecDendriteCyan_2"/>
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            </segmentGroup>

            <segmentGroup id="dendrite_group">
                <include segmentGroup="SecDendriteCyan_2"/>
                <include segmentGroup="SecDendriteCyan_1_R_1"/>
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            </segmentGroup>

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
        </morphology>

            <!--Adding the biophysical parameters-->

        <biophysicalProperties id="biophys">

            <membraneProperties>

                <channelDensity condDensity="0.46 mS_per_cm2" id="Ca_HVA_soma_group" ionChannel="Ca_HVA" segmentGroup="soma_group"/>

                <channelDensity condDensity="0.25 mS_per_cm2" id="Ca_LVA_soma_group" ionChannel="Ca_LVA" segmentGroup="soma_group"/>

                <channelDensity condDensity="0.05 mS_per_cm2" id="HCN1_soma_group" ionChannel="HCN1" segmentGroup="soma_group"/>

                <channelDensity condDensity="0.08 mS_per_cm2" id="HCN2_soma_group" ionChannel="HCN2" segmentGroup="soma_group"/>

                <channelDensity condDensity="8.0 mS_per_cm2" id="KA_soma_group" ionChannel="KA" segmentGroup="soma_group"/>

                <channelDensity condDensity="3.0 mS_per_cm2" id="KBK_soma_group" ionChannel="KBK" segmentGroup="soma_group"/>

                <channelDensity condDensity="1.0 mS_per_cm2" id="KM_soma_group" ionChannel="KM" segmentGroup="soma_group"/>

                <channelDensity condDensity="38.0 mS_per_cm2" id="KSK_soma_group" ionChannel="KSK" segmentGroup="soma_group"/>

                <channelDensity condDensity="32.0 mS_per_cm2" id="KV_soma_group" ionChannel="KV" segmentGroup="soma_group"/>

                <channelDensity condDensity="0.0667 mS_per_cm2" id="LeakConductance_all" ionChannel="LeakConductance" erev="-55.0 mV"/>

                <channelDensity condDensity="0.19 mS_per_cm2" id="NaP_soma_group" ionChannel="NaP" segmentGroup="soma_group"/>

                <channelDensity condDensity="1.7 mS_per_cm2" id="NaR_soma_group" ionChannel="NaR" segmentGroup="soma_group"/>

                <channelDensity condDensity="48.0 mS_per_cm2" id="NaT_soma_group" ionChannel="NaT" segmentGroup="soma_group"/>

                <channelDensity condDensity="0.0 mS_per_cm2" id="VariableLeakConductance_all" ionChannel="VariableLeakConductance" erev="-55.0 mV" ion="non_specific"/>

                <spikeThresh value="0 mV"/>

                <specificCapacitance value="1.0 uF_per_cm2"/>

                <initMembPotential value="-60.0 mV"/>

            </membraneProperties>

            <intracellularProperties>

                <species/>

                <species/>

                <resistivity value="0.28 kohm_cm"/>

            </intracellularProperties>

        </biophysicalProperties>

    </cell>

</neuroml>
