<?xml version="1.0" encoding="iso-8859-1"?>
<!--
    Example of a simple leak current specified in ChannelML.
    Taken from Michael Hines's initial proposal
-->
<neuroml xmlns="http://www.neuroml.org/schema/neuroml2" xmlns:xsi="http://www.w3.org/2001/XMLSchema-instance" xsi:schemaLocation="http://www.neuroml.org/schema/neuroml2 https://raw.github.com/NeuroML/NeuroML2/development/Schemas/NeuroML2/NeuroML_v2beta2.xsd" id="LeakConductance">

    <notes>ChannelML file containing a single Channel description</notes>

    <ionChannel id="LeakConductance" conductance="10pS" type="ionChannelPassive">

        <notes>ChannelML file containing a single Channel description</notes>
                                    Not yet implemented....

    </ionChannel>

</neuroml>
