<?xml version="1.0" encoding="UTF-8"?>
<neuroml xmlns="http://morphml.org/neuroml/schema" xmlns:meta="http://morphml.org/metadata/schema" xmlns:mml="http://morphml.org/morphml/schema" xmlns:bio="http://morphml.org/biophysics/schema" xmlns:cml="http://morphml.org/channelml/schema" xmlns:net="http://morphml.org/networkml/schema" xmlns:xsi="http://www.w3.org/2001/XMLSchema-instance" xsi:schemaLocation="http://morphml.org/neuroml/schema  http://neuroml.svn.sourceforge.net/viewvc/neuroml/trunk/web/NeuroMLFiles/Schemata/v1.8.1/Level3/NeuroML_Level3_v1.8.1.xsd" lengthUnits="micron">

    <cells>
        <cell name="Golgi_210710_C1">

            <meta:notes>Cell morphology generated by neuroConstruct from file: Cell-No2-210710-C1.ASC
V3 text file written for MicroBrightField products.</meta:notes>

            <mml:segments>

                <mml:segment id="0" name="RootSegment" cable="0">
                    <mml:proximal x="0.0" y="0.0" z="0.0" diameter="20.0"/>
                    <mml:distal x="0.0" y="0.0" z="0.0" diameter="20.0"/>
                </mml:segment>

                <mml:segment id="60" name="DendriteCyan_10000" parent="0" cable="1">
                    <mml:proximal x="0.36528873" y="11.053084" z="0.0" diameter="2.07"/>
                    <mml:distal x="0.4373169" y="12.215845" z="0.0" diameter="1.48"/>
                </mml:segment>

                <mml:segment id="61" name="DendriteCyan_10001" parent="60" cable="1">
                    <mml:distal x="0.6191063" y="13.351165" z="0.0" diameter="1.18"/>
                </mml:segment>

                <mml:segment id="62" name="DendriteCyan_10002" parent="61" cable="1">
                    <mml:distal x="0.6757002" y="14.423031" z="0.0" diameter="1.04"/>
                </mml:segment>

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
            </mml:segments>

            <mml:cables>

                <mml:cable id="0" name="Soma">
                    <meta:group>all</meta:group>
                    <meta:group>soma_group</meta:group>
                    <meta:group>mossy</meta:group>
                </mml:cable>

                <mml:cable id="1" name="SecDendriteCyan_2">
                    <meta:properties>

                    <meta:property tag="numberInternalDivisions" value="2"/>

                    </meta:properties>

                    <meta:group>all</meta:group>
                    <meta:group>dendrite_group</meta:group>
                    <meta:group>colour_Cyan</meta:group>
                    <meta:group>mossy</meta:group>
                    <meta:group>GCL</meta:group>
                    <meta:group>apical_dend_2</meta:group>
                </mml:cable>

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
            </mml:cables>

            <!--Adding the biophysical parameters-->

            <biophysics units="Physiological Units">

                <bio:mechanism name="CALC" type="Ion Concentration">    <!--Note: not adding gmax for Ion Concentration.
Value for scaling factor to apply to current to get change in conc should be
 determined from ChannelML file for the CaPool...-->

                </bio:mechanism>

                <bio:mechanism name="CALC_ca2" type="Ion Concentration">    <!--Note: not adding gmax for Ion Concentration.
Value for scaling factor to apply to current to get change in conc should be
 determined from ChannelML file for the CaPool...-->

                </bio:mechanism>

                <bio:mechanism name="Ca_HVA" type="Channel Mechanism">
                    <bio:parameter name="gmax" value="0.46">
                        <bio:group>soma_group</bio:group>
                    </bio:parameter>
                </bio:mechanism>

                <bio:mechanism name="Ca_LVA" type="Channel Mechanism">
                    <bio:parameter name="gmax" value="0.25">
                        <bio:group>soma_group</bio:group>
                    </bio:parameter>
                </bio:mechanism>

                <bio:mechanism name="HCN1" type="Channel Mechanism">
                    <bio:parameter name="gmax" value="0.05">
                        <bio:group>soma_group</bio:group>
                    </bio:parameter>
                </bio:mechanism>

                <bio:mechanism name="HCN2" type="Channel Mechanism">
                    <bio:parameter name="gmax" value="0.08">
                        <bio:group>soma_group</bio:group>
                    </bio:parameter>
                </bio:mechanism>

                <bio:mechanism name="KA" type="Channel Mechanism">
                    <bio:parameter name="gmax" value="8.0">
                        <bio:group>soma_group</bio:group>
                    </bio:parameter>
                </bio:mechanism>

                <bio:mechanism name="KBK" type="Channel Mechanism">
                    <bio:parameter name="gmax" value="3.0">
                        <bio:group>soma_group</bio:group>
                    </bio:parameter>
                </bio:mechanism>

                <bio:mechanism name="KM" type="Channel Mechanism">
                    <bio:parameter name="gmax" value="1.0">
                        <bio:group>soma_group</bio:group>
                    </bio:parameter>
                </bio:mechanism>

                <bio:mechanism name="KSK" type="Channel Mechanism">
                    <bio:parameter name="gmax" value="38.0">
                        <bio:group>soma_group</bio:group>
                    </bio:parameter>
                </bio:mechanism>

                <bio:mechanism name="KV" type="Channel Mechanism">
                    <bio:parameter name="gmax" value="32.0">
                        <bio:group>soma_group</bio:group>
                    </bio:parameter>
                </bio:mechanism>

                <bio:mechanism name="LeakConductance" type="Channel Mechanism" passive_conductance="true">
                    <bio:parameter name="e" value="-55.0">
                        <bio:group>all</bio:group>
                    </bio:parameter>
                    <bio:parameter name="gmax" value="0.0667">
                        <bio:group>all</bio:group>
                    </bio:parameter>
                </bio:mechanism>

                <bio:mechanism name="NaP" type="Channel Mechanism">
                    <bio:parameter name="gmax" value="0.19">
                        <bio:group>soma_group</bio:group>
                    </bio:parameter>
                </bio:mechanism>

                <bio:mechanism name="NaR" type="Channel Mechanism">
                    <bio:parameter name="gmax" value="1.7">
                        <bio:group>soma_group</bio:group>
                    </bio:parameter>
                </bio:mechanism>

                <bio:mechanism name="NaT" type="Channel Mechanism">
                    <bio:parameter name="gmax" value="48.0">
                        <bio:group>soma_group</bio:group>
                    </bio:parameter>
                </bio:mechanism>

                <bio:mechanism name="VariableLeakConductance" type="Channel Mechanism" passive_conductance="true">
                    <bio:parameter name="e" value="-55.0">
                        <bio:group>all</bio:group>
                    </bio:parameter>
                    <bio:parameter name="gmax" value="0.0">
                        <bio:group>all</bio:group>
                    </bio:parameter>
                </bio:mechanism>

                <bio:spec_capacitance>
                    <bio:parameter value="1.0">
                        <bio:group>all</bio:group>
                    </bio:parameter>
                </bio:spec_capacitance>

                <bio:spec_axial_resistance>
                    <bio:parameter value="0.28">
                        <bio:group>all</bio:group>
                    </bio:parameter>
                </bio:spec_axial_resistance>

                <bio:init_memb_potential>
                    <bio:parameter value="-60.0">
                        <bio:group>all</bio:group>
                    </bio:parameter>
                </bio:init_memb_potential>

                <bio:ion_props name="na">
                    <bio:parameter name="e" value="87.39">
                        <bio:group>soma_group</bio:group>
                    </bio:parameter>
                </bio:ion_props>

                <bio:ion_props name="k">
                    <bio:parameter name="e" value="-84.69">
                        <bio:group>soma_group</bio:group>
                    </bio:parameter>
                </bio:ion_props>
            </biophysics>

            <connectivity>
                <net:potential_syn_loc synapse_type="ApicalSyn">
                    <net:group>parfiber</net:group>
                </net:potential_syn_loc>

                <net:potential_syn_loc synapse_type="GABA">
                    <net:group>mossy</net:group>
                </net:potential_syn_loc>

                <net:potential_syn_loc synapse_type="GapJuncDiscrete" synapse_direction="post">
                    <net:group>dendrite_group</net:group>
                </net:potential_syn_loc>

                <net:potential_syn_loc synapse_type="GapJuncGCL">
                    <net:group>GCL</net:group>
                </net:potential_syn_loc>

                <net:potential_syn_loc synapse_type="GapJuncML1">
                    <net:group>ML1</net:group>
                </net:potential_syn_loc>

                <net:potential_syn_loc synapse_type="GapJuncML2">
                    <net:group>ML2</net:group>
                </net:potential_syn_loc>

                <net:potential_syn_loc synapse_type="GapJuncML3">
                    <net:group>ML3</net:group>
                </net:potential_syn_loc>

                <net:potential_syn_loc synapse_type="Golgi_AMPA_mf">
                    <net:group>mossy</net:group>
                </net:potential_syn_loc>

                <net:potential_syn_loc synapse_type="Golgi_AMPA_pf">
                    <net:group>parfiber</net:group>
                </net:potential_syn_loc>

                <net:potential_syn_loc synapse_type="Golgi_NMDA_mf">
                    <net:group>mossy</net:group>
                </net:potential_syn_loc>

                <net:potential_syn_loc synapse_type="Golgi_NMDA_pf">
                    <net:group>parfiber</net:group>
                </net:potential_syn_loc>

                <net:potential_syn_loc synapse_type="Golgi_gap_2010" synapse_direction="post">
                    <net:group>dendrite_group</net:group>
                </net:potential_syn_loc>

                <net:potential_syn_loc synapse_type="Golgi_gap_GCL">
                    <net:group>GCL</net:group>
                </net:potential_syn_loc>

                <net:potential_syn_loc synapse_type="Golgi_gap_ML1">
                    <net:group>ML1</net:group>
                </net:potential_syn_loc>

                <net:potential_syn_loc synapse_type="Golgi_gap_ML2">
                    <net:group>ML2</net:group>
                </net:potential_syn_loc>

                <net:potential_syn_loc synapse_type="Golgi_gap_ML3">
                    <net:group>ML3</net:group>
                </net:potential_syn_loc>

                <net:potential_syn_loc synapse_type="MultiDecaySyn_VervaekeEtAl_GJCompensate">
                    <net:group>mossy</net:group>

                    <net:group>parfiber</net:group>
                </net:potential_syn_loc>

                <net:potential_syn_loc synapse_type="NMDA">
                    <net:group>soma_group</net:group>

                    <net:group>dendrite_group</net:group>
                </net:potential_syn_loc>
            </connectivity>

        </cell>
    </cells>
</neuroml>
