<?xml version="1.0" encoding="UTF-8"?>
<neuroml xmlns="http://morphml.org/neuroml/schema" xmlns:meta="http://morphml.org/metadata/schema" xmlns:mml="http://morphml.org/morphml/schema" xmlns:bio="http://morphml.org/biophysics/schema" xmlns:cml="http://morphml.org/channelml/schema" xmlns:net="http://morphml.org/networkml/schema" xmlns:xsi="http://www.w3.org/2001/XMLSchema-instance" xsi:schemaLocation="http://morphml.org/neuroml/schema  http://neuroml.svn.sourceforge.net/viewvc/neuroml/trunk/web/NeuroMLFiles/Schemata/v1.8.1/Level3/NeuroML_Level3_v1.8.1.xsd" lengthUnits="micron">

    <cells>
        <cell name="Golgi_NeuroML">

            <meta:notes>A conversion to NeuroML (with channels specified in ChannelML) of the Golgi_040408_C1_v2 cell model in this project.
See the main project description for more details on the cells included with this project.</meta:notes>

            <mml:segments>

                <mml:segment id="0" name="RootSegment" cable="0">
                    <mml:proximal x="0.0" y="0.0" z="0.0" diameter="27.0"/>
                    <mml:distal x="0.0" y="0.0" z="0.0" diameter="27.0"/>
                </mml:segment>

                <mml:segment id="30" name="AxonBlue_1_R" parent="0" cable="1">
                    <mml:proximal x="0.03" y="-10.04" z="1.1" diameter="2.66"/>
                    <mml:distal x="0.32" y="-13.14" z="1.1" diameter="1.77"/>
                </mml:segment>

                <mml:segment id="31" name="AxonBlue_10000" parent="30" cable="1">
                    <mml:distal x="0.17" y="-15.87" z="1.1" diameter="1.48"/>
                </mml:segment>

                <mml:segment id="32" name="AxonBlue_10001" parent="31" cable="1">
                    <mml:distal x="-0.42" y="-18.380001" z="1.05" diameter="1.26"/>
                </mml:segment>

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
            </mml:segments>

            <mml:cables>

                <mml:cable id="0" name="Soma">
                    <meta:group>all</meta:group>
                    <meta:group>soma_group</meta:group>
                </mml:cable>

                <mml:cable id="1" name="SecAxonBlue_1_R">
                    <meta:group>all</meta:group>
                    <meta:group>colour_Blue</meta:group>
                    <meta:group>axon_group</meta:group>
                </mml:cable>

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
            </mml:cables>

            <!--Adding the biophysical parameters-->

            <biophysics units="Physiological Units">

                <bio:mechanism name="NaR_CML_VervaekeEtAl_GolgiCellNetwork" type="Channel Mechanism">
                    <bio:parameter name="gmax" value="1.7">
                        <bio:group>soma_group</bio:group>
                    </bio:parameter>
                </bio:mechanism>

                <bio:mechanism name="Kslow_CML_VervaekeEtAl_GolgiCellNetwork" type="Channel Mechanism">
                    <bio:parameter name="gmax" value="1.0">
                        <bio:group>soma_group</bio:group>
                    </bio:parameter>
                </bio:mechanism>

                <bio:mechanism name="hcn2f_CML_VervaekeEtAl_GolgiCellNetwork" type="Channel Mechanism">
                    <bio:parameter name="gmax" value="0.08">
                        <bio:group>soma_group</bio:group>
                    </bio:parameter>
                </bio:mechanism>

                <bio:mechanism name="CaLVA_CML_VervaekeEtAl_GolgiCellNetwork" type="Channel Mechanism">
                    <bio:parameter name="gmax" value="0.25">
                        <bio:group>soma_group</bio:group>
                    </bio:parameter>
                </bio:mechanism>

                <bio:mechanism name="KC_CML_VervaekeEtAl_GolgiCellNetwork" type="Channel Mechanism">
                    <bio:parameter name="gmax" value="3.0">
                        <bio:group>soma_group</bio:group>
                    </bio:parameter>
                </bio:mechanism>

                <bio:mechanism name="CaHVA_CML_VervaekeEtAl_GolgiCellNetwork" type="Channel Mechanism">
                    <bio:parameter name="gmax" value="0.46">
                        <bio:group>soma_group</bio:group>
                    </bio:parameter>
                </bio:mechanism>

                <bio:mechanism name="KV_CML_VervaekeEtAl_GolgiCellNetwork" type="Channel Mechanism">
                    <bio:parameter name="gmax" value="32.0">
                        <bio:group>soma_group</bio:group>
                    </bio:parameter>
                </bio:mechanism>

                <bio:mechanism name="KA_CML_VervaekeEtAl_GolgiCellNetwork" type="Channel Mechanism">
                    <bio:parameter name="gmax" value="8.0">
                        <bio:group>soma_group</bio:group>
                    </bio:parameter>
                </bio:mechanism>

                <bio:mechanism name="KAHP_CML_VervaekeEtAl_GolgiCellNetwork" type="Channel Mechanism">
                    <bio:parameter name="gmax" value="38.0">
                        <bio:group>soma_group</bio:group>
                    </bio:parameter>
                </bio:mechanism>

                <bio:mechanism name="LeakConductance" type="Channel Mechanism" passive_conductance="true">
                    <bio:parameter name="e" value="-55.0">
                        <bio:group>all</bio:group>
                    </bio:parameter>
                    <bio:parameter name="gmax" value="0.021">
                        <bio:group>all</bio:group>
                    </bio:parameter>
                </bio:mechanism>

                <bio:mechanism name="Golgi_CALC_CML_VervaekeEtAl_GolgiCellNetwork" type="Ion Concentration">
                    <bio:parameter name="gmax" value="-1.0E8">
                        <bio:group>soma_group</bio:group>
                    </bio:parameter>
                    <bio:parameter name="thickness" value="0.20304">    <!--Note: Units of extra parameters are not known, except if it's e!!-->

                        <bio:group>soma_group</bio:group>
                    </bio:parameter>
                </bio:mechanism>

                <bio:mechanism name="Golgi_CALC_ca2_CML_VervaekeEtAl_GolgiCellNetwork" type="Ion Concentration">
                    <bio:parameter name="gmax" value="-1.0E8">
                        <bio:group>soma_group</bio:group>
                    </bio:parameter>
                    <bio:parameter name="thickness" value="0.20304">    <!--Note: Units of extra parameters are not known, except if it's e!!-->

                        <bio:group>soma_group</bio:group>
                    </bio:parameter>
                </bio:mechanism>

                <bio:mechanism name="hcn1s_CML_VervaekeEtAl_GolgiCellNetwork" type="Channel Mechanism">
                    <bio:parameter name="gmax" value="0.05">
                        <bio:group>soma_group</bio:group>
                    </bio:parameter>
                </bio:mechanism>

                <bio:mechanism name="NaP_CML_VervaekeEtAl_GolgiCellNetwork" type="Channel Mechanism">
                    <bio:parameter name="gmax" value="0.19">
                        <bio:group>soma_group</bio:group>
                    </bio:parameter>
                </bio:mechanism>

                <bio:mechanism name="NaT_CML_VervaekeEtAl_GolgiCellNetwork" type="Channel Mechanism">
                    <bio:parameter name="gmax" value="48.0">
                        <bio:group>soma_group</bio:group>
                    </bio:parameter>
                </bio:mechanism>

                <bio:mechanism name="hcn1f_CML_VervaekeEtAl_GolgiCellNetwork" type="Channel Mechanism">
                    <bio:parameter name="gmax" value="0.05">
                        <bio:group>soma_group</bio:group>
                    </bio:parameter>
                </bio:mechanism>

                <bio:mechanism name="hcn2s_CML_VervaekeEtAl_GolgiCellNetwork" type="Channel Mechanism">
                    <bio:parameter name="gmax" value="0.08">
                        <bio:group>soma_group</bio:group>
                    </bio:parameter>
                </bio:mechanism>

                <bio:spec_capacitance>
                    <bio:parameter value="1.0">
                        <bio:group>all</bio:group>
                    </bio:parameter>
                </bio:spec_capacitance>

                <bio:spec_axial_resistance>
                    <bio:parameter value="0.1">
                        <bio:group>all</bio:group>
                    </bio:parameter>
                </bio:spec_axial_resistance>

                <bio:init_memb_potential>
                    <bio:parameter value="-60.0">
                        <bio:group>all</bio:group>
                    </bio:parameter>
                </bio:init_memb_potential>

                <bio:ion_props name="na">
                    <bio:parameter name="e" value="87.39">
                        <bio:group>soma_group</bio:group>
                    </bio:parameter>
                </bio:ion_props>

                <bio:ion_props name="k">
                    <bio:parameter name="e" value="-84.69">
                        <bio:group>soma_group</bio:group>
                    </bio:parameter>
                </bio:ion_props>
            </biophysics>

            <connectivity>
                <net:potential_syn_loc synapse_type="MultiDecaySyn">
                    <net:group>basolateral</net:group>
                </net:potential_syn_loc>

                <net:potential_syn_loc synapse_type="ApicalSyn">
                    <net:group>apical</net:group>
                </net:potential_syn_loc>

                <net:potential_syn_loc synapse_type="GapJuncCML" synapse_direction="post">
                    <net:group>dendrite_group</net:group>
                </net:potential_syn_loc>
            </connectivity>

        </cell>
    </cells>
</neuroml>
